x := 9
F(t) := [tan(t); cos(t); t]
sum(3*i, i = 3 .. 13) = 264
transpose([3, 1, 2; 7, 6, 5; 8, 9, 0]) = [3, 7, 8; 1, 6, 9; 2, 5, 0]
y := (x + 3) + 3
x := [9, 6, 7; 1, 8, 4; 5, 7, 8]
2 + 4 = 6
ORIGIN := 1
x = [9, 6, 7; 1, 8, 4; 5, 7, 8]
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x^-1 = [0.218182, 0.00606061, -0.193939; 0.0727273, 0.224242, -0.175758; -0.2, -0.2, 0.4]
FF(x, y) := x^y
# [component: inputs CreateSpace(F, -15, 15, 300)]
# [component: inputs CreateSpace(F, -15, 15, 300)]
# [component: inputs CreateSpace(F, -15, 15, 300)]
x^(y + 1) = [
    3.04249e19, 4.98592e19, 4.27059e19;
    1.38269e19, 2.2659e19, 1.94081e19;
    2.57754e19, 4.22397e19, 3.61796e19
]
