M := [3.81, 0.25, 1.28, 1.25; 2.25, 1.32, 5.38, 0.49; 5.31, 6.78, 1.48, 1.04; 9.89, 2.45, 3.35, 2.28]
v := [4.21; 6.97; 2.38; 10.98]
my := [1.14811; -0.616491; 1.13679; -1.17221]
lsolve(M, v) = [1.1765; -0.621117; 1.06364; -1.18292]
n := 4
b := lsolve(M, v)
q := sqrt(sum((my[k - 1] - b[k - 1])^2, k = 1 .. n)/n)
q = 0.0396656
r := v - M*lsolve(M, v)
r = [0; 0; 8.88178e-16; 0]
