M := [
    5.18 + 0.25, 1.12, 0.95, 1.32, 0.83;
    1.12, 4.28 - 0.25, 2.12, 0.57, 0.91;
    0.95, 2.12, 6.13 + 0.25, 1.29, 1.57;
    1.32, 0.57, 1.29, 4.57 - 0.25, 1.25;
    0.83, 0.91, 1.57, 1.25, 5.21 + 0.25
]
v := [6.19 + 0.25; 3.21; 4.28 - 0.25; 6.25; 4.95 + 0.25]
my := [1.14811; -0.616491; 1.13679; -1.17221]
lsolve(M, v) = [0.793076; 0.266417; 0.0940349; 0.986533; 0.534525]
n := 5
b := lsolve(M, v)
q := sqrt(sum((my[k - 1] - b[k - 1])^2, k = 1 .. n)/n)  # error: Индекс массива является недопустимым для этого массива.
r := v - M*lsolve(M, v)
r = [0; 0; 0; 0; -8.88178e-16]
q =  # error: Эта переменная не определена.
