t := 6
a := 0.11*t
k := -7
b := 0.02*k
g := 0.02*k
d := 0.015*t
Q := [
    6.26 + a, 1.10 - b, 0.97 + g, 1.24 - d;
    1.10 - b, 4.16 - a, 1.30, 0.16;
    0.97 + g, 1.30, 5.44 + a, 2.10;
    1.24 - d, 0.16, 2.10, 6.10 - a
]
my := eigenvals(Q)
l1 := eigenvec(Q, 2.48479)
l3 := eigenvec(Q, 6.00371)
f(x) := x^4 - 21.96*x^3 - (-167.976*x^2) - 529.518*x^1 - (-577.406*x^0)
l1 = [-0.231762; 0.789501; -0.43978; 0.359956]
l3 = [0.776406; 0.0911788; -0.523205; -0.339318]
C := f(x) coeffs, x → [577.406; -529.518; 167.976; -21.96; 1]
l2 := eigenvec(Q, 4.1541)
l4 := eigenvec(Q, 9.3174)
r := polyroots(C)
l2 = [0.079804; -0.544534; -0.437619; 0.711058]
l4 = [0.580613; 0.268062; 0.584242; 0.499691]
r = [2.48478; 4.15425; 6.00344; 9.31753]
my = [2.48479; 4.1541; 6.00371; 9.3174]
P := [21.96, -167.976, 529.518, -577.406; 1, 0, 0, 0; 0, 1, 0, 0; 0, 0, 1, 0]
p1 := eigenvec(P, 2.48479)
p2 := eigenvec(P, 4.1541)
p1 = [-0.915757; -0.368547; -0.148322; -0.0596923]
p2 = [0.970601; 0.23364; 0.0562412; 0.0135382]
p4 := eigenvec(P, 9.3174)
p3 := eigenvec(P, 6.00371)
p4 = [0.994224; 0.106705; 0.011452; 0.00122908]
p3 = [0.98603; 0.164244; 0.0273584; 0.00455711]
