x := transpose([20, 22, 24, 26, 28])
y := transpose([2.17039650571, 1.8020491241, 2.34792622261, 3.38266310523, 4.02719632757])
s := cspline(x, y)
f(t) := sin(t/2) + nthroot(t, 3)
A(t) := interp(s, x, y, t)
FF(t) := -0.00118150715727*t^4 + 0.099836893969*t^3 + (-3.03913412859*t^2) + 39.1424098304*t - 174.678155253
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s = [0; 3; 2; 0.306541; 0.228556; 0.150571; -0.0975509; -0.345673]
