x := transpose([0, 2, 4, 6, 8])
y := transpose([0.540302305868, -0.723325829934, 1.35032885213, 3.15390225434, 3.35553640478])
s := cspline(x, y)
A(t) := interp(s, x, y, t)
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s = [0; 3; 2; 1.87838; 0.834321; -0.209739; -0.400485; -0.59123]
