a := 0.5
b := 1.4
integral(log(x^2 + 1, 10)/x, x = a .. b) = 0.25597
my_trapez := 0.255949910191
my_gaus := 0.255963792394
my_mathcad := 0.256
my_mathcad - my_trapez = 5.00898e-5
my_mathcad - my_gaus = 3.62076e-5
m := 2
y(x) := d^4/dx^4(log(x^2 + 1, 10)/x)
yt(x) := d^2/dx^2(log(x^2 + 1, 10)/x)
y(a) = 2.47159
n := 29
yt(a) = -0.395079
a_gaus := (m!)^4*(b - a)^-1*y(a)/((2*m + 1)*((2*m)!)^3) = 0.000635697
a_trapez := (b - a)^3*1.39999/(12*n^2) = 0.000101129
