a := -0.7
b := 1.2
integral(log(x^2 + 1, 10)/x, x = a .. b) = 0.145528
my_trapez := 0.145522081009
my_gaus := 0.14555007817
my_mathcad := 0.1455
my_mathcad - my_trapez = -2.2081e-5
my_mathcad - my_gaus = -5.00782e-5
m := 5
y(x) := d^4/dx^4(log(x^2 + 1, 10)/x)
yt(x) := d^2/dx^2(log(x^2 + 1, 10)/x)
y(a) = -1.02199
n := 83
yt(a) = 0.370681
a_gaus := (m!)^4*(b - a)^-1*y(a)/((2*m + 1)*((2*m)!)^3) = -2.12196e-13
a_trapez := (b - a)^3*1.39999/(12*n^2) = 0.000116158
