x := [0; 1; 2; 3; 4; 5; 6]
y := [0; 8.015263; 10.799505; 3.880154; 0.153061; 0.089136; 0.199238]
y1 := [0; 7.996455; 10.784722; 3.880149; 0.153058; 0.089136; 0.199237]
J := lspline(x, y)
J1 := lspline(x, y1)
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eps := [0; 0.023533; 0.003017; 0.006533; 0.000297; 0.000014; 0.000266]
eps1 := [0; 0.049528; 0.007882; 0.013108; 0.000615; 0.000027; 0.000522]
F := lspline(x, eps)
F1 := lspline(x, eps1)
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f(x, y) := 1 + 11.3*y*sin(x) - y^2
x1 := 6
y0 := 0
x0 := 0
Given
(d/dx(y(x))) == f(x, y(x))
y(x0) == y0
y := Odesolve(x, x1)
x := x0, x0 + 0.1 .. x1
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y(0) = 0
y(3) = 3.85897
y(1) = 7.91689
y(4) = 0.154958
y(2) = 10.7084
y(5) = 0.0899052
y(6) = 0.200544
D(x, y) := [1 + 11.3*y[0]*sin(x) - y[0]^2]
y0 := 0
M := 60
u := rkfixed(y0, 0, 6, M, D)
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u = [
    0, 0;
    0.1, 0.10349;
    0.2, 0.22945;
    0.3, 0.408441;
    0.4, 0.689582;
    0.5, 1.15338;
    0.6, 1.91634;
    0.7, 3.09101;
    0.8, 4.66281;
    0.9, 6.38403
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]
